# OpenSim document version 40500
Model armed_model_torque:
  gravity: 0 -9.81 0
  length_units: meters
  force_units: N
  Ground
  BodySet:
    Body pelvis: mass=11.777 [kg] mass_center=(-0.0707 0 0) inertia=(0.1028 0.0871 0.0579 0 0 0)
        meshes=(r_pelvis.vtp l_pelvis.vtp sacrum.vtp)
      WrapCylinder Gmax1_at_pelvis_r: xyz_body_rotation=(-0.6 0.45 0) translation=(-0.077 -0.099 0.061) quadrant=-x
          radius=0.04 length=0.15
      WrapCylinder Gmax2_at_pelvis_r: xyz_body_rotation=(-0.75 0.39 0) translation=(-0.08 -0.083 0.068) quadrant=all
          radius=0.04 length=0.1
      WrapCylinder Gmax3_at_pelvis_r: xyz_body_rotation=(-0.1 0 0) translation=(-0.083 -0.088 0.068) quadrant=all
          radius=0.04 length=0.1
      WrapCylinder Gmax1_at_pelvis_l: xyz_body_rotation=(0.6 -0.45 0) translation=(-0.077 -0.099 -0.061) quadrant=-x
          radius=0.04 length=0.15
      WrapCylinder Gmax2_at_pelvis_l: xyz_body_rotation=(0.75 -0.39 0) translation=(-0.08 -0.083 -0.068) quadrant=all
          radius=0.04 length=0.1
      WrapCylinder Gmax3_at_pelvis_l: xyz_body_rotation=(0.1 0 0) translation=(-0.083 -0.088 -0.068) quadrant=all
          radius=0.04 length=0.1
      WrapCylinder PS_at_brim_r: xyz_body_rotation=(-0.25 -0.27 0.1) translation=(-0.074 -0.06 0.0656) quadrant=-y
          radius=0.05 length=0.1
      WrapCylinder PS_at_brim_l: xyz_body_rotation=(0.25 0.27 0.1) translation=(-0.074 -0.06 -0.0656) quadrant=-y
          radius=0.05 length=0.1
      WrapCylinder IL_at_brim_r: xyz_body_rotation=(-0.32 -0.24 0.9) translation=(-0.071 -0.065 0.0756) quadrant=-y
          radius=0.0549 length=0.1
      WrapCylinder IL_at_brim_l: xyz_body_rotation=(0.32 0.24 0.9) translation=(-0.071 -0.065 -0.0756) quadrant=-y
          radius=0.0549 length=0.1
    Body femur_l: mass=9.3014 mass_center=(0 -0.17 0) inertia=(0.1339 0.0351 0.1412 0 0 0) meshes=l_femur.vtp
      WrapCylinder GasLat_at_condyles_l: translation=(0.005 -0.41 0) quadrant=all radius=0.026 length=0.1
      WrapCylinder GasMed_at_condyles_l: translation=(0.005 -0.41 0) quadrant=all radius=0.025 length=0.1
      WrapCylinder KnExt_at_fem_l: xyz_body_rotation=(0.0623366 -0.0507601 0)
          translation=(0.00358828 -0.402732 -0.00209111) quadrant=all radius=0.025 length=0.1
      WrapCylinder KnExtVL_at_fem_l: xyz_body_rotation=(0.0623366 -0.0507601 0)
          translation=(0.00188828 -0.402732 -0.00209111) quadrant=all radius=0.025 length=0.1
      WrapCylinder AB_at_femshaft_l: xyz_body_rotation=(-1.66157 -0.186644 0)
          translation=(0.0146434 -0.112595 -0.023365) quadrant=all radius=0.0165 length=0.07
      WrapCylinder AL_at_femshaft_l: xyz_body_rotation=(-1.77711 -0.136489 0)
          translation=(0.0307327 -0.231909 -0.0151137) quadrant=all radius=0.0201 length=0.1
      WrapCylinder AMprox_at_femshaft_l: xyz_body_rotation=(-1.61126 -0.18656 0)
          translation=(0.00518299 -0.0728948 -0.025403) quadrant=all radius=0.0211 length=0.07
      WrapCylinder AMmid_at_femshaft_l: xyz_body_rotation=(-1.61139 -0.13656 0)
          translation=(0.0230125 -0.160711 -0.0205842) quadrant=all radius=0.0214 length=0.12
      WrapCylinder AMdist_at_femshaft_l: xyz_body_rotation=(-1.71188 -0.186636 0)
          translation=(0.0316065 -0.260736 -0.0093646) quadrant=all radius=0.0218 length=0.2
      WrapCylinder AMisch_at_condyles_l: xyz_body_rotation=(-1.71115 0.463363 0)
          translation=(-0.0226511 -0.376831 0.00315437) quadrant=all radius=0.04 length=0.24
    Body femur_r: mass=9.3014 mass_center=(0 -0.17 0) inertia=(0.1339 0.0351 0.1412 0 0 0) meshes=r_femur.vtp
      WrapCylinder GasLat_at_condyles_r: translation=(0.005 -0.41 0) quadrant=all radius=0.026 length=0.1
      WrapCylinder GasMed_at_condyles_r: translation=(0.005 -0.41 0) quadrant=all radius=0.025 length=0.1
      WrapCylinder KnExt_at_fem_r: xyz_body_rotation=(-0.0623366 0.0507601 0)
          translation=(0.00358828 -0.402732 0.00209111) quadrant=all radius=0.025 length=0.1
      WrapCylinder KnExtVL_at_fem_r: xyz_body_rotation=(-0.0623366 0.0507601 0)
          translation=(0.00188828 -0.402732 0.00209111) quadrant=all radius=0.025 length=0.1
      WrapCylinder AB_at_femshaft_r: xyz_body_rotation=(1.66157 0.186644 0) translation=(0.0146434 -0.112595 0.023365)
          quadrant=all radius=0.0165 length=0.07
      WrapCylinder AL_at_femshaft_r: xyz_body_rotation=(1.77711 0.136489 0) translation=(0.0307327 -0.231909 0.0151137)
          quadrant=all radius=0.0201 length=0.1
      WrapCylinder AMprox_at_femshaft_r: xyz_body_rotation=(1.61126 0.18656 0)
          translation=(0.00518299 -0.0728948 0.025403) quadrant=all radius=0.0211 length=0.07
      WrapCylinder AMmid_at_femshaft_r: xyz_body_rotation=(1.61139 0.13656 0)
          translation=(0.0230125 -0.160711 0.0205842) quadrant=all radius=0.0214 length=0.12
      WrapCylinder AMdist_at_femshaft_r: xyz_body_rotation=(1.71188 0.186636 0)
          translation=(0.0316065 -0.260736 0.0093646) quadrant=all radius=0.0218 length=0.2
      WrapCylinder AMisch_at_condyles_r: xyz_body_rotation=(1.71115 -0.463363 0)
          translation=(-0.0226511 -0.376831 -0.00315437) quadrant=all radius=0.04 length=0.24
    Body tibia_l: mass=3.7075 mass_center=(0 -0.1867 0) inertia=(0.0504 0.0051 0.0511 0 0 0)
        meshes=(l_tibia.vtp l_fibula.vtp)
      WrapCylinder GasLat_at_shank_l: xyz_body_rotation=(-2.96723 0.279725 -1.47812)
          translation=(-0.0074 -0.074 0.0033) quadrant=-y radius=0.055 length=0.1
      WrapCylinder GasMed_at_shank_l: xyz_body_rotation=(-2.96723 -0.0279725 -1.47812)
          translation=(-0.0074 -0.074 0.0033) quadrant=-y radius=0.059 length=0.1
      WrapCylinder GR_at_condyles_l: xyz_body_rotation=(0 0.4 0) translation=(-0.003 -0.02 0) quadrant=all radius=0.036
          length=0.1
      WrapCylinder SM_at_condyles_l: xyz_body_rotation=(0 0.1 0) translation=(-0.001 -0.02 0) quadrant=all
          radius=0.0345 length=0.1
      WrapCylinder ST_at_condyles_l: xyz_body_rotation=(0 0.2 0) translation=(-0.002 -0.0205 0) quadrant=all
          radius=0.0425 length=0.1
      WrapCylinder BF140_at_gastroc_l: translation=(-0.039 -0.06 0) quadrant=all radius=0.029 length=0.15
    Body tibia_r: mass=3.7075 mass_center=(0 -0.1867 0) inertia=(0.0504 0.0051 0.0511 0 0 0)
        meshes=(r_tibia.vtp r_fibula.vtp)
      WrapCylinder GasLat_at_shank_r: xyz_body_rotation=(2.96723 -0.279725 -1.47812)
          translation=(-0.0074 -0.074 -0.0033) quadrant=-y radius=0.055 length=0.1
      WrapCylinder GasMed_at_shank_r: xyz_body_rotation=(2.96723 0.0279725 -1.47812)
          translation=(-0.0074 -0.074 -0.0033) quadrant=-y radius=0.059 length=0.1
      WrapCylinder GR_at_condyles_r: xyz_body_rotation=(0 -0.4 0) translation=(-0.003 -0.02 0) quadrant=all
          radius=0.036 length=0.1
      WrapCylinder SM_at_condyles_r: xyz_body_rotation=(0 -0.1 0) translation=(-0.001 -0.02 0) quadrant=all
          radius=0.0345 length=0.1
      WrapCylinder ST_at_condyles_r: xyz_body_rotation=(0 -0.2 0) translation=(-0.002 -0.0205 0) quadrant=all
          radius=0.0425 length=0.1
      WrapCylinder BF140_at_gastroc_r: translation=(-0.039 -0.06 0) quadrant=y radius=0.029 length=0.15
    Body patella_l: mass=0.0862 mass_center=(0.0018 0.0264 0) inertia=(2.87e-6 1.311e-5 1.311e-5 0 0 0)
        meshes=l_patella.vtp
    Body patella_r: mass=0.0862 mass_center=(0.0018 0.0264 0) inertia=(2.87e-6 1.311e-5 1.311e-5 0 0 0)
        meshes=r_patella.vtp
    Body talus_l: mass=0.1 mass_center=(0 0 0) inertia=(0.001 0.001 0.001 0 0 0) meshes=l_talus.vtp
    Body talus_r: mass=0.1 mass_center=(0 0 0) inertia=(0.001 0.001 0.001 0 0 0) meshes=r_talus.vtp
    Body calcn_l: mass=1.25 mass_center=(0.1 0.03 0) inertia=(0.0014 0.0039 0.0041 0 0 0) meshes=l_foot.vtp
    Body calcn_r: mass=1.25 mass_center=(0.1 0.03 0) inertia=(0.0014 0.0039 0.0041 0 0 0) meshes=r_foot.vtp
    Body toes_l: mass=0.2166 mass_center=(0.0346 0.006 0.0175) inertia=(0.0001 0.0002 0.001 0 0 0) meshes=l_bofoot.vtp
    Body toes_r: mass=0.2166 mass_center=(0.0346 0.006 0.0175) inertia=(0.0001 0.0002 0.001 0 0 0) meshes=r_bofoot.vtp
    Body torso: mass=26.8266 mass_center=(-0.03 0.32 0) inertia=(1.4745 0.7555 1.4314 0 0 0)
        meshes=(hat_spine.vtp hat_jaw.vtp hat_skull.vtp hat_ribs_scap.vtp)
      WrapEllipsoid upperribcage: xyz_body_rotation=(0 0 0.25) translation=(0 0.2 0) quadrant=+y
          dimensions=(0.0944 0.2079 0.147)
    Body humerus_r: mass=2.0325 mass_center=(0 -0.164502 0) inertia=(0.011946 0.004121 0.013409 0 0 0)
        meshes=humerus_rv.vtp
      WrapSphere shoulder_r: translation=(0 0 0) quadrant=all radius=0.02
      WrapCylinder elbow_ant_r: xyz_body_rotation=(0 0.35 0) translation=(0.005 -0.28 0) quadrant=+x radius=0.02
          length=0.05
    Body ulna_r: mass=0.6075 mass_center=(0 -0.120525 0) inertia=(0.002962 0.000618 0.003213 0 0 0) meshes=ulna_rv.vtp
      WrapCylinder elbow_pos_r: xyz_body_rotation=(0 0 0.5) translation=(0 0 0) quadrant=+y radius=0.03 length=0.05
    Body radius_r: mass=0.6075 mass_center=(0 -0.120525 0) inertia=(0.002962 0.000618 0.003213 0 0 0)
        meshes=radius_rv.vtp
    Body hand_r: mass=0.4575 mass_center=(0 -0.068095 0) inertia=(0.000892 0.000547 0.00134 0 0 0)
        meshes=(pisiform_rvs.vtp lunate_rvs.vtp scaphoid_rvs.vtp triquetrum_rvs.vtp hamate_rvs.vtp capitate_rvs.vtp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)
    Body humerus_l: mass=2.0325 mass_center=(0 -0.164502 0) inertia=(0.011946 0.004121 0.013409 0 0 0)
        meshes=humerus_lv.vtp
      WrapSphere shoulder_l: translation=(0 0 0) quadrant=all radius=0.02
      WrapCylinder elbow_ant_l: xyz_body_rotation=(0 -0.35 0) translation=(0.005 -0.28 0) quadrant=+x radius=0.02
          length=0.05
    Body ulna_l: mass=0.6075 mass_center=(0 -0.120525 0) inertia=(0.002962 0.000618 0.003213 0 0 0) meshes=ulna_lv.vtp
      WrapCylinder elbow_pos_l: xyz_body_rotation=(0 0 0.5) translation=(0 0 0) quadrant=+y radius=0.03 length=0.05
    Body radius_l: mass=0.6075 mass_center=(0 -0.120525 0) inertia=(0.002962 0.000618 0.003213 0 0 0)
        meshes=radius_lv.vtp
    Body hand_l: mass=0.4575 mass_center=(0 -0.068095 0) inertia=(0.000892 0.000547 0.00134 0 0 0)
        meshes=(pisiform_lvs.vtp lunate_lvs.vtp scaphoid_lvs.vtp triquetrum_lvs.vtp hamate_lvs.vtp capitate_lvs.vtp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)
    Body sword: mass=1.1 mass_center=(0 0 0) inertia=(0.09166667 5.5e-5 0.09166667 0 0 0)
      Brick sword_geom_1: half_lengths=(0.01 0.5 0.01)
    Body shield: mass=3.7 mass_center=(0 0.07 0) inertia=(0.1208864 0.06064578 0.1814927 0 0 0)
      Brick shield_geom_1: half_lengths=(0.275 0.35 0.004)
  JointSet:
    CustomJoint groundPelvis: socket_parent_frame=ground_offset socket_child_frame=pelvis_offset
      Coordinate pelvis_tilt: range=(-1.570796 1.570796)
      Coordinate pelvis_list: range=(-1.570796 1.570796)
      Coordinate pelvis_rotation: range=(-1.570796 1.570796)
      Coordinate pelvis_tx: range=(-5 5)
      Coordinate pelvis_ty: default_value=0.94 range=(-3 3)
      Coordinate pelvis_tz: default_value=0 range=(-3 3)
      PhysicalOffsetFrame ground_offset: socket_parent=/ground translation=(0 0 0) [meters]
      PhysicalOffsetFrame pelvis_offset: socket_parent=/bodyset/pelvis translation=(0 0 0)
      SpatialTransform:
        TransformAxis rotation1: coordinates=pelvis_tilt axis=(0 0 1) LinearFunction(coefficients=1 0)
        TransformAxis rotation2: coordinates=pelvis_list axis=(1 0 0) LinearFunction(coefficients=1 0)
        TransformAxis rotation3: coordinates=pelvis_rotation axis=(0 1 0) LinearFunction(coefficients=1 0)
        TransformAxis translation1: coordinates=pelvis_tx axis=(1 0 0) LinearFunction(coefficients=1 0)
        TransformAxis translation2: coordinates=pelvis_ty axis=(0 1 0) LinearFunction(coefficients=1 0)
        TransformAxis translation3: coordinates=pelvis_tz axis=(0 0 1) LinearFunction(coefficients=1 0)
    CustomJoint hip_l: socket_parent_frame=pelvis_offset socket_child_frame=femur_l_offset
      Coordinate hip_flexion_l: default_value=0 range=(-0.5235988 2.094395)
      Coordinate hip_adduction_l: range=(-0.8726646 0.5235988)
      Coordinate hip_rotation_l: range=(-0.6981317 0.6981317)
      PhysicalOffsetFrame pelvis_offset: socket_parent=/bodyset/pelvis translation=(-0.056276 -0.07849 -0.07726)
      PhysicalOffsetFrame femur_l_offset: socket_parent=/bodyset/femur_l translation=(0 0 0)
      SpatialTransform: axes_held_at_zero=(translation1 translation2 translation3)
        TransformAxis rotation1: coordinates=hip_flexion_l axis=(0 0 1) LinearFunction(coefficients=1 0)
        TransformAxis rotation2: coordinates=hip_adduction_l axis=(1 0 0) LinearFunction(coefficients=-1 0)
        TransformAxis rotation3: coordinates=hip_rotation_l axis=(0 1 0) LinearFunction(coefficients=-1 0)
    CustomJoint hip_r: socket_parent_frame=pelvis_offset socket_child_frame=femur_r_offset
      Coordinate hip_flexion_r: default_value=0 range=(-0.5235988 2.094395)
      Coordinate hip_adduction_r: range=(-0.8726646 0.5235988)
      Coordinate hip_rotation_r: range=(-0.6981317 0.6981317)
      PhysicalOffsetFrame pelvis_offset: socket_parent=/bodyset/pelvis translation=(-0.056276 -0.07849 0.07726)
      PhysicalOffsetFrame femur_r_offset: socket_parent=/bodyset/femur_r translation=(0 0 0)
      SpatialTransform: axes_held_at_zero=(translation1 translation2 translation3)
        TransformAxis rotation1: coordinates=hip_flexion_r axis=(0 0 1) LinearFunction(coefficients=1 0)
        TransformAxis rotation2: coordinates=hip_adduction_r axis=(1 0 0) LinearFunction(coefficients=1 0)
        TransformAxis rotation3: coordinates=hip_rotation_r axis=(0 1 0) LinearFunction(coefficients=1 0)
    CustomJoint patellofemoral_l: socket_parent_frame=tibia_l_offset socket_child_frame=patella_l_offset
      Coordinate knee_angle_l_beta
      PhysicalOffsetFrame tibia_l_offset: socket_parent=/bodyset/femur_l translation=(-0.00809 -0.40796 0.00275)
      PhysicalOffsetFrame patella_l_offset: socket_parent=/bodyset/patella_l translation=(0 0 0)
      SpatialTransform: axes_held_at_zero=(rotation2 rotation3)
        TransformAxis rotation1: coordinates=knee_angle_l_beta axis=(0 0 1)
          SimmSpline: x=(0 0.174533 0.349066 0.523599 0.698132 0.872665 1.0472 1.22173 1.39626 1.5708 1.74533 1.91986 2.0944)
              y=(0.00113686 -0.00629212 -0.105582 -0.253683 -0.414245 -0.579047 -0.747244 -0.91799 -1.09044 -1.26379 -1.43763 -1.61186 -1.78634)
        TransformAxis translation1: coordinates=knee_angle_l_beta axis=(1 0 0)
          SimmSpline: x=(0 0.174533 0.349066 0.523599 0.698132 0.872665 1.0472 1.22173 1.39626 1.5708 1.74533 1.91986 2.0944)
              y=(0.0524 0.0488 0.0437 0.0371 0.0296 0.0216 0.0136 0.0057 -0.0019 -0.0088 -0.0148 -0.0196 -0.0227)
        TransformAxis translation2: coordinates=knee_angle_l_beta axis=(0 1 0)
          SimmSpline: x=(0 0.174533 0.349066 0.523599 0.698132 0.872665 1.0472 1.22173 1.39626 1.5708 1.74533 1.91986 2.0944)
              y=(-0.0108 -0.019 -0.0263 -0.0322 -0.0367 -0.0395 -0.0408 -0.0404 -0.0384 -0.0349 -0.0301 -0.0245 -0.0187)
        TransformAxis translation3: axis=(0 0 1) Constant(value=-0.00275)
    CustomJoint patellofemoral_r: socket_parent_frame=tibia_r_offset socket_child_frame=patella_r_offset
      Coordinate knee_angle_r_beta
      PhysicalOffsetFrame tibia_r_offset: socket_parent=/bodyset/femur_r translation=(-0.00809 -0.40796 -0.00275)
      PhysicalOffsetFrame patella_r_offset: socket_parent=/bodyset/patella_r translation=(0 0 0)
      SpatialTransform: axes_held_at_zero=(rotation2 rotation3)
        TransformAxis rotation1: coordinates=knee_angle_r_beta axis=(0 0 1)
          SimmSpline: x=(0 0.174533 0.349066 0.523599 0.698132 0.872665 1.0472 1.22173 1.39626 1.5708 1.74533 1.91986 2.0944)
              y=(0.00113686 -0.00629212 -0.105582 -0.253683 -0.414245 -0.579047 -0.747244 -0.91799 -1.09044 -1.26379 -1.43763 -1.61186 -1.78634)
        TransformAxis translation1: coordinates=knee_angle_r_beta axis=(1 0 0)
          SimmSpline: x=(0 0.174533 0.349066 0.523599 0.698132 0.872665 1.0472 1.22173 1.39626 1.5708 1.74533 1.91986 2.0944)
              y=(0.0524 0.0488 0.0437 0.0371 0.0296 0.0216 0.0136 0.0057 -0.0019 -0.0088 -0.0148 -0.0196 -0.0227)
        TransformAxis translation2: coordinates=knee_angle_r_beta axis=(0 1 0)
          SimmSpline: x=(0 0.174533 0.349066 0.523599 0.698132 0.872665 1.0472 1.22173 1.39626 1.5708 1.74533 1.91986 2.0944)
              y=(-0.0108 -0.019 -0.0263 -0.0322 -0.0367 -0.0395 -0.0408 -0.0404 -0.0384 -0.0349 -0.0301 -0.0245 -0.0187)
        TransformAxis translation3: axis=(0 0 1) Constant(value=0.00275)
    PinJoint knee_l: socket_parent_frame=femur_l_offset socket_child_frame=tibia_l_offset
      Coordinate knee_angle_l: default_value=0 range=(-2.094395 0)
      PhysicalOffsetFrame femur_l_offset: socket_parent=/bodyset/femur_l translation=(0 -0.40796 0.00275)
      PhysicalOffsetFrame tibia_l_offset: socket_parent=/bodyset/tibia_l translation=(0 0 0)
    PinJoint knee_r: socket_parent_frame=femur_r_offset socket_child_frame=tibia_r_offset
      Coordinate knee_angle_r: default_value=0 range=(-2.094395 0)
      PhysicalOffsetFrame femur_r_offset: socket_parent=/bodyset/femur_r translation=(0 -0.40796 -0.00275)
      PhysicalOffsetFrame tibia_r_offset: socket_parent=/bodyset/tibia_r translation=(0 0 0)
    PinJoint ankle_l: socket_parent_frame=tibia_l_offset socket_child_frame=talus_l_offset
      Coordinate ankle_angle_l: range=(-0.6981317 0.5235988)
      PhysicalOffsetFrame tibia_l_offset: socket_parent=/bodyset/tibia_l translation=(-0.01 -0.4 0)
          orientation=(-0.1758952 0.105208 0.01866219) [radians]
      PhysicalOffsetFrame talus_l_offset: socket_parent=/bodyset/talus_l translation=(0 0 0)
          orientation=(-0.1758952 0.105208 0.01866219)
    PinJoint ankle_r: socket_parent_frame=tibia_r_offset socket_child_frame=talus_r_offset
      Coordinate ankle_angle_r: range=(-0.6981317 0.5235988)
      PhysicalOffsetFrame tibia_r_offset: socket_parent=/bodyset/tibia_r translation=(-0.01 -0.4 0)
          orientation=(0.1758952 -0.105208 0.01866219)
      PhysicalOffsetFrame talus_r_offset: socket_parent=/bodyset/talus_r translation=(0 0 0)
          orientation=(0.1758952 -0.105208 0.01866219)
    PinJoint subtalar_l: socket_parent_frame=talus_l_offset socket_child_frame=calcn_l_offset
      Coordinate subtalar_angle_l: range=(-0.3490659 0.3490659)
      PhysicalOffsetFrame talus_l_offset: socket_parent=/bodyset/talus_l translation=(-0.04877 -0.04195 -0.00792)
          orientation=(1.768191 -0.906223 1.819602)
      PhysicalOffsetFrame calcn_l_offset: socket_parent=/bodyset/calcn_l translation=(0 0 0)
          orientation=(1.768191 -0.906223 1.819602)
    PinJoint subtalar_r: socket_parent_frame=talus_r_offset socket_child_frame=calcn_r_offset
      Coordinate subtalar_angle_r: range=(-0.3490659 0.3490659)
      PhysicalOffsetFrame talus_r_offset: socket_parent=/bodyset/talus_r translation=(-0.04877 -0.04195 0.00792)
          orientation=(-1.768191 0.906223 1.819602)
      PhysicalOffsetFrame calcn_r_offset: socket_parent=/bodyset/calcn_r translation=(0 0 0)
          orientation=(-1.768191 0.906223 1.819602)
    PinJoint mtp_l: socket_parent_frame=calcn_l_offset socket_child_frame=toes_l_offset
      Coordinate mtp_angle_l: range=(-1.0472 1.0472)
      PhysicalOffsetFrame calcn_l_offset: socket_parent=/bodyset/calcn_l translation=(0.1788 -0.002 -0.00108)
          orientation=(0 0.6199005 0)
      PhysicalOffsetFrame toes_l_offset: socket_parent=/bodyset/toes_l translation=(0 0 0) orientation=(0 0.6199005 0)
    PinJoint mtp_r: socket_parent_frame=calcn_r_offset socket_child_frame=toes_r_offset
      Coordinate mtp_angle_r: range=(-1.0472 1.0472)
      PhysicalOffsetFrame calcn_r_offset: socket_parent=/bodyset/calcn_r translation=(0.1788 -0.002 0.00108)
          orientation=(0 -0.6199005 0)
      PhysicalOffsetFrame toes_r_offset: socket_parent=/bodyset/toes_r translation=(0 0 0) orientation=(0 -0.6199005 0)
    CustomJoint lumbar: socket_parent_frame=pelvis_offset socket_child_frame=torso_offset
      Coordinate lumbar_ext: range=(-1.570796 1.570796)
      Coordinate lumbar_bend: range=(-1.570796 1.570796)
      Coordinate lumbar_rota: range=(-1.570796 1.570796)
      PhysicalOffsetFrame pelvis_offset: socket_parent=/bodyset/pelvis translation=(-0.1007 0.0815 0)
      PhysicalOffsetFrame torso_offset: socket_parent=/bodyset/torso translation=(0 0 0)
      SpatialTransform: axes_held_at_zero=(translation1 translation2 translation3)
        TransformAxis rotation1: coordinates=lumbar_ext axis=(0 0 1) LinearFunction(coefficients=1 0)
        TransformAxis rotation2: coordinates=lumbar_bend axis=(1 0 0) LinearFunction(coefficients=1 0)
        TransformAxis rotation3: coordinates=lumbar_rota axis=(0 1 0) LinearFunction(coefficients=1 0)
    CustomJoint shoulder_r: socket_parent_frame=torso_offset socket_child_frame=humerus_r_offset
      Coordinate shoulder_flexion_r: range=(-1.0472 3.1416)
      Coordinate shoulder_adduction_r: range=(-0.5236 0.1745)
      Coordinate shoulder_rotation_r: range=(-0.5236 0.5236)
      PhysicalOffsetFrame torso_offset: socket_parent=/bodyset/torso translation=(0.003155 0.3715 0.17)
      PhysicalOffsetFrame humerus_r_offset: socket_parent=/bodyset/humerus_r translation=(0 0 0)
      SpatialTransform: axes_held_at_zero=(translation1 translation2 translation3)
        TransformAxis rotation1: coordinates=shoulder_flexion_r axis=(0 0 1) LinearFunction(coefficients=1 0)
        TransformAxis rotation2: coordinates=shoulder_adduction_r axis=(1 0 0) LinearFunction(coefficients=1 0)
        TransformAxis rotation3: coordinates=shoulder_rotation_r axis=(0 1 0) LinearFunction(coefficients=1 0)
    PinJoint elbow_r: socket_parent_frame=humerus_r_offset socket_child_frame=ulna_r_offset
      Coordinate elbow_flexion_r: range=(0 2.618)
      PhysicalOffsetFrame humerus_r_offset: socket_parent=/bodyset/humerus_r translation=(0.013144 -0.286273 -0.009595)
          orientation=(-0.02286271 0.2280177 0.005168901)
      PhysicalOffsetFrame ulna_r_offset: socket_parent=/bodyset/ulna_r translation=(0 0 0)
          orientation=(-0.02286271 0.2280177 0.005168901)
    WeldJoint radioulnar_r: socket_parent_frame=ulna_r_offset socket_child_frame=radius_r_offset
      PhysicalOffsetFrame ulna_r_offset: socket_parent=/bodyset/ulna_r translation=(-0.006727 -0.013007 0.026083)
          orientation=(-1.568841 0.05642797 1.536144)
      PhysicalOffsetFrame radius_r_offset: socket_parent=/bodyset/radius_r translation=(0 0 0)
          orientation=(-1.568841 0.05642797 -0.0346525)
    WeldJoint wrist_r: socket_parent_frame=radius_r_offset socket_child_frame=hand_r_offset
      PhysicalOffsetFrame radius_r_offset: socket_parent=/bodyset/radius_r translation=(-0.008797 -0.235841 0.01361)
      PhysicalOffsetFrame hand_r_offset: socket_parent=/bodyset/hand_r translation=(0 0 0)
    CustomJoint shoulder_l: socket_parent_frame=torso_offset socket_child_frame=humerus_l_offset
      Coordinate shoulder_flexion_l: range=(-1.0472 3.1416)
      Coordinate shoulder_adduction_l: range=(-0.5236 0.1745)
      Coordinate shoulder_rotation_l: range=(-0.5236 0.5236)
      PhysicalOffsetFrame torso_offset: socket_parent=/bodyset/torso translation=(0.003155 0.3715 -0.17)
      PhysicalOffsetFrame humerus_l_offset: socket_parent=/bodyset/humerus_l translation=(0 0 0)
      SpatialTransform: axes_held_at_zero=(translation1 translation2 translation3)
        TransformAxis rotation1: coordinates=shoulder_flexion_l axis=(0 0 1) LinearFunction(coefficients=1 0)
        TransformAxis rotation2: coordinates=shoulder_adduction_l axis=(1 0 0) LinearFunction(coefficients=-1 0)
        TransformAxis rotation3: coordinates=shoulder_rotation_l axis=(0 1 0) LinearFunction(coefficients=-1 0)
    PinJoint elbow_l: socket_parent_frame=humerus_l_offset socket_child_frame=ulna_l_offset
      Coordinate elbow_flexion_l: range=(0 2.618)
      PhysicalOffsetFrame humerus_l_offset: socket_parent=/bodyset/humerus_l translation=(0.013144 -0.286273 0.009595)
          orientation=(0.02286271 -0.2280177 0.005168901)
      PhysicalOffsetFrame ulna_l_offset: socket_parent=/bodyset/ulna_l translation=(0 0 0)
          orientation=(0.02286271 -0.2280177 0.005168901)
    WeldJoint radioulnar_l: socket_parent_frame=ulna_l_offset socket_child_frame=radius_l_offset
      PhysicalOffsetFrame ulna_l_offset: socket_parent=/bodyset/ulna_l translation=(-0.006727 -0.013007 -0.026083)
          orientation=(1.568841 -0.05642797 1.536144)
      PhysicalOffsetFrame radius_l_offset: socket_parent=/bodyset/radius_l translation=(0 0 0)
          orientation=(1.568841 -0.05642797 -0.0346525)
    WeldJoint wrist_l: socket_parent_frame=radius_l_offset socket_child_frame=hand_l_offset
      PhysicalOffsetFrame radius_l_offset: socket_parent=/bodyset/radius_l translation=(-0.008797 -0.235841 -0.01361)
      PhysicalOffsetFrame hand_l_offset: socket_parent=/bodyset/hand_l translation=(0 0 0)
    WeldJoint sword_weld: socket_parent_frame=hand_r_offset socket_child_frame=sword_offset
      PhysicalOffsetFrame hand_r_offset: socket_parent=/bodyset/hand_r translation=(0.03 -0.07 -0.1)
      PhysicalOffsetFrame sword_offset: socket_parent=/bodyset/sword translation=(0 0.5 0) orientation=(1.570796 0 0)
    WeldJoint shield_weld: socket_parent_frame=radius_l_offset socket_child_frame=shield_offset
      PhysicalOffsetFrame radius_l_offset: socket_parent=/bodyset/radius_l translation=(-0.05 -0.15 0)
      PhysicalOffsetFrame shield_offset: socket_parent=/bodyset/shield translation=(0 0 0)
          orientation=(1.570796 0.7853982 1.570796)
  ConstraintSet:
    CoordinateCouplerConstraint patellofemoral_knee_angle_r_con: independent_coordinate_names=knee_angle_r
        dependent_coordinate_name=knee_angle_r_beta scale_factor=1
        coupled_coordinates_function=LinearFunction(coefficients=-1 0)
    CoordinateCouplerConstraint patellofemoral_knee_angle_l_con: independent_coordinate_names=knee_angle_l
        dependent_coordinate_name=knee_angle_l_beta scale_factor=1
        coupled_coordinates_function=LinearFunction(coefficients=-1 0)
  ForceSet:
    ExpressionBasedCoordinateForce PassiveToeMoment_r: coordinate=mtp_angle_r
        expression=-0.05-0.9*exp(14.87*(q-0.21))+0.18*exp(-70.08*(q+0.02))-0.1*qdot
    ExpressionBasedCoordinateForce PassiveToeMoment_l: coordinate=mtp_angle_l
        expression=-0.05-0.9*exp(14.87*(q-0.21))+0.18*exp(-70.08*(q+0.02))-0.1*qdot
    ExpressionBasedCoordinateForce PassiveHipDampingX_r: coordinate=hip_flexion_r
        expression=-2.44*exp(5.05*(q-1.81))+1.51*exp(-21.88*(q+0.47))-0.1*qdot
    ExpressionBasedCoordinateForce PassiveHipDampingY_r: coordinate=hip_adduction_r
        expression=-0.03*exp(14.94*(q-0.50))+0.03*exp(-14.94*(q+0.50))-0.1*qdot
    ExpressionBasedCoordinateForce PassiveHipDampingZ_r: coordinate=hip_rotation_r
        expression=-0.03*exp(14.94*(q-0.92))+0.03*exp(-14.94*(q+0.92))-0.1*qdot
    ExpressionBasedCoordinateForce PassiveHipDampingX_l: coordinate=hip_flexion_l
        expression=-2.44*exp(5.05*(q-1.81))+1.51*exp(-21.88*(q+0.47))-0.1*qdot
    ExpressionBasedCoordinateForce PassiveHipDampingY_l: coordinate=hip_adduction_l
        expression=-0.03*exp(14.94*(q-0.50))+0.03*exp(-14.94*(q+0.50))-0.1*qdot
    ExpressionBasedCoordinateForce PassiveHipDampingZ_l: coordinate=hip_rotation_l
        expression=-0.03*exp(14.94*(q-0.92))+0.03*exp(-14.94*(q+0.92))-0.1*qdot
    ExpressionBasedCoordinateForce PassiveKneeDamping_r: coordinate=knee_angle_r
        expression=-6.09*exp(33.94*(q-0.13))+11.03*exp(-11.33*(q+2.40))-0.1*qdot
    ExpressionBasedCoordinateForce PassiveKneeDamping_l: coordinate=knee_angle_l
        expression=-6.09*exp(33.94*(q-0.13))+11.03*exp(-11.33*(q+2.40))-0.1*qdot
    ExpressionBasedCoordinateForce PassiveAnkleDamping_r: coordinate=ankle_angle_r
        expression=-2.03*exp(38.11*(q-0.52))+0.18*exp(-42.12*(q+0.74))-0.1*qdot
    ExpressionBasedCoordinateForce PassiveAnkleDamping_l: coordinate=ankle_angle_l
        expression=-2.03*exp(38.11*(q-0.52))+0.18*exp(-42.12*(q+0.74))-0.1*qdot
    ExpressionBasedCoordinateForce PassiveSubtalarDamping_r: coordinate=subtalar_angle_r
        expression=-60.21*exp(16.32*(q-0.65))+60.21*exp(-16.32*(q+0.65))-0.1*qdot
    ExpressionBasedCoordinateForce PassiveSubtalarDamping_l: coordinate=subtalar_angle_l
        expression=-60.21*exp(16.32*(q-0.65))+60.21*exp(-16.32*(q+0.65))-0.1*qdot
    ExpressionBasedCoordinateForce PassiveLumbarDampingX: coordinate=lumbar_ext
        expression=-0.35*exp(30.72*(q-0.17))+0.25*exp(-20.36*(q+0.35))-0.1*qdot
    ExpressionBasedCoordinateForce PassiveLumbarDampingY: coordinate=lumbar_bend
        expression=-0.25*exp(20.36*(q-0.17))+0.25*exp(-20.36*(q+0.17))-0.1*qdot
    ExpressionBasedCoordinateForce PassiveLumbarDampingZ: coordinate=lumbar_rota
        expression=-0.25*exp(20.36*(q-0.17))+0.25*exp(-20.36*(q+0.17))-0.1*qdot
    ExpressionBasedCoordinateForce PassiveShoulderDampingX_r: coordinate=shoulder_flexion_r
        expression=-2.44*exp(5.05*(q-1.81))+1.51*exp(-11.88*(q+0.50))-1.0*qdot
    ExpressionBasedCoordinateForce PassiveShoulderDampingY_r: coordinate=shoulder_adduction_r
        expression=-15.03*exp(20.94*(q-0.05))+5.03*exp(-14.93*(q+1.57))-1.0*qdot
    ExpressionBasedCoordinateForce PassiveShoulderDampingZ_r: coordinate=shoulder_rotation_r
        expression=-0.43*exp(14.94*(q-0.15))+0.43*exp(-14.93*(q+0.15))-1.0*qdot
    ExpressionBasedCoordinateForce PassiveElbowDamping_r: coordinate=elbow_flexion_r
        expression=2.09*exp(-6.94*(q-0.30))-11.03*exp(11.33*(q-2.40))-1.0*qdot
    ExpressionBasedCoordinateForce PassiveShoulderDampingX_l: coordinate=shoulder_flexion_l
        expression=-2.44*exp(5.05*(q-1.81))+1.51*exp(-11.88*(q+0.50))-1.0*qdot
    ExpressionBasedCoordinateForce PassiveShoulderDampingY_l: coordinate=shoulder_adduction_l
        expression=-15.03*exp(20.94*(q-0.05))+5.03*exp(-14.93*(q+1.57))-1.0*qdot
    ExpressionBasedCoordinateForce PassiveShoulderDampingZ_l: coordinate=shoulder_rotation_l
        expression=-0.43*exp(14.94*(q-0.15))+0.43*exp(-14.93*(q+0.15))-1.0*qdot
    ExpressionBasedCoordinateForce PassiveElbowDamping_l: coordinate=elbow_flexion_l
        expression=2.09*exp(-6.94*(q-0.30))-11.03*exp(11.33*(q-2.40))-1.0*qdot
    SmoothSphereHalfSpaceForce [values shared by the 22 below unless stated]: socket_half_space=/contactgeometryset/floor
        stiffness=3067776 [N/m^2] dissipation=2 [s/m] static_friction=0.8 dynamic_friction=0.8 viscous_friction=0.5
        transition_velocity=0.2 [m/s] hertz_smoothing=300 hunt_crossley_smoothing=50
    SmoothSphereHalfSpaceForce contactHeel_r: socket_sphere=/contactgeometryset/heel_r
    SmoothSphereHalfSpaceForce contactLatHeel_r: socket_sphere=/contactgeometryset/latheel_r
    SmoothSphereHalfSpaceForce contactMedHeel_r: socket_sphere=/contactgeometryset/medheel_r
    SmoothSphereHalfSpaceForce contactMid_r: socket_sphere=/contactgeometryset/mid_r
    SmoothSphereHalfSpaceForce contactLatMid_r: socket_sphere=/contactgeometryset/latmid_r
    SmoothSphereHalfSpaceForce contactMedMid_r: socket_sphere=/contactgeometryset/medmid_r
    SmoothSphereHalfSpaceForce contactMH1_r: socket_sphere=/contactgeometryset/mh1_r
    SmoothSphereHalfSpaceForce contactMH3_r: socket_sphere=/contactgeometryset/mh3_r
    SmoothSphereHalfSpaceForce contactMH5_r: socket_sphere=/contactgeometryset/mh5_r
    SmoothSphereHalfSpaceForce contactHallux_r: socket_sphere=/contactgeometryset/hallux_r
    SmoothSphereHalfSpaceForce contactOtherToes_r: socket_sphere=/contactgeometryset/othertoes_r stiffness=306777.6
    SmoothSphereHalfSpaceForce contactHeel_l: socket_sphere=/contactgeometryset/heel_l
    SmoothSphereHalfSpaceForce contactLatHeel_l: socket_sphere=/contactgeometryset/latheel_l
    SmoothSphereHalfSpaceForce contactMedHeel_l: socket_sphere=/contactgeometryset/medheel_l
    SmoothSphereHalfSpaceForce contactMid_l: socket_sphere=/contactgeometryset/mid_l
    SmoothSphereHalfSpaceForce contactLatMid_l: socket_sphere=/contactgeometryset/latmid_l
    SmoothSphereHalfSpaceForce contactMedMid_l: socket_sphere=/contactgeometryset/medmid_l
    SmoothSphereHalfSpaceForce contactMH1_l: socket_sphere=/contactgeometryset/mh1_l
    SmoothSphereHalfSpaceForce contactMH3_l: socket_sphere=/contactgeometryset/mh3_l
    SmoothSphereHalfSpaceForce contactMH5_l: socket_sphere=/contactgeometryset/mh5_l
    SmoothSphereHalfSpaceForce contactHallux_l: socket_sphere=/contactgeometryset/hallux_l
    SmoothSphereHalfSpaceForce contactOtherToes_l: socket_sphere=/contactgeometryset/othertoes_l stiffness=306777.6
    CoordinateActuator reserve_jointset_groundPelvis_pelvis_tilt: coordinate=pelvis_tilt optimal_force=300
    CoordinateActuator reserve_jointset_groundPelvis_pelvis_list: coordinate=pelvis_list optimal_force=300
    CoordinateActuator reserve_jointset_groundPelvis_pelvis_rotation: coordinate=pelvis_rotation optimal_force=300
    CoordinateActuator reserve_jointset_groundPelvis_pelvis_tx: coordinate=pelvis_tx optimal_force=1000
    CoordinateActuator reserve_jointset_groundPelvis_pelvis_ty: coordinate=pelvis_ty optimal_force=1000
    CoordinateActuator reserve_jointset_groundPelvis_pelvis_tz: coordinate=pelvis_tz optimal_force=1000
    CoordinateActuator reserve_jointset_hip_l_hip_flexion_l: coordinate=hip_flexion_l optimal_force=300
    CoordinateActuator reserve_jointset_hip_l_hip_adduction_l: coordinate=hip_adduction_l optimal_force=300
    CoordinateActuator reserve_jointset_hip_l_hip_rotation_l: coordinate=hip_rotation_l optimal_force=300
    CoordinateActuator reserve_jointset_hip_r_hip_flexion_r: coordinate=hip_flexion_r optimal_force=300
    CoordinateActuator reserve_jointset_hip_r_hip_adduction_r: coordinate=hip_adduction_r optimal_force=300
    CoordinateActuator reserve_jointset_hip_r_hip_rotation_r: coordinate=hip_rotation_r optimal_force=300
    CoordinateActuator reserve_jointset_knee_l_knee_angle_l: coordinate=knee_angle_l optimal_force=300
    CoordinateActuator reserve_jointset_knee_r_knee_angle_r: coordinate=knee_angle_r optimal_force=300
    CoordinateActuator reserve_jointset_ankle_l_ankle_angle_l: coordinate=ankle_angle_l optimal_force=300
    CoordinateActuator reserve_jointset_ankle_r_ankle_angle_r: coordinate=ankle_angle_r optimal_force=300
    CoordinateActuator reserve_jointset_subtalar_l_subtalar_angle_l: coordinate=subtalar_angle_l optimal_force=300
    CoordinateActuator reserve_jointset_subtalar_r_subtalar_angle_r: coordinate=subtalar_angle_r optimal_force=300
    CoordinateActuator reserve_jointset_mtp_l_mtp_angle_l: coordinate=mtp_angle_l optimal_force=300
    CoordinateActuator reserve_jointset_mtp_r_mtp_angle_r: coordinate=mtp_angle_r optimal_force=300
    CoordinateActuator reserve_jointset_lumbar_lumbar_ext: coordinate=lumbar_ext optimal_force=300
    CoordinateActuator reserve_jointset_lumbar_lumbar_bend: coordinate=lumbar_bend optimal_force=300
    CoordinateActuator reserve_jointset_lumbar_lumbar_rota: coordinate=lumbar_rota optimal_force=300
    CoordinateActuator reserve_jointset_shoulder_r_shoulder_flexion_r: coordinate=shoulder_flexion_r optimal_force=400
    CoordinateActuator reserve_jointset_shoulder_r_shoulder_adduction_r: coordinate=shoulder_adduction_r
        optimal_force=400
    CoordinateActuator reserve_jointset_shoulder_r_shoulder_rotation_r: coordinate=shoulder_rotation_r
        optimal_force=400
    CoordinateActuator reserve_jointset_elbow_r_elbow_flexion_r: coordinate=elbow_flexion_r optimal_force=400
    CoordinateActuator reserve_jointset_shoulder_l_shoulder_flexion_l: coordinate=shoulder_flexion_l optimal_force=400
    CoordinateActuator reserve_jointset_shoulder_l_shoulder_adduction_l: coordinate=shoulder_adduction_l
        optimal_force=400
    CoordinateActuator reserve_jointset_shoulder_l_shoulder_rotation_l: coordinate=shoulder_rotation_l
        optimal_force=400
    CoordinateActuator reserve_jointset_elbow_l_elbow_flexion_l: coordinate=elbow_flexion_l optimal_force=400
  ContactGeometrySet:
    ContactSphere heel_r: socket_frame=/bodyset/calcn_r location=(0.001307528 -0.0081 0) radius=0.015
    ContactSphere latheel_r: socket_frame=/bodyset/calcn_r location=(0.02130753 -0.0081 0.025) radius=0.015
    ContactSphere medheel_r: socket_frame=/bodyset/calcn_r location=(0.02130753 -0.0081 -0.025) radius=0.015
    ContactSphere mid_r: socket_frame=/bodyset/calcn_r location=(0.08355376 -0.0081 0.0056) radius=0.015
    ContactSphere latmid_r: socket_frame=/bodyset/calcn_r location=(0.07215376 -0.0081 0.031) radius=0.015
    ContactSphere medmid_r: socket_frame=/bodyset/calcn_r location=(0.09165376 -0.0081 -0.023) radius=0.015
    ContactSphere mh1_r: socket_frame=/bodyset/calcn_r location=(0.182 -0.0081 -0.023) radius=0.015
    ContactSphere mh3_r: socket_frame=/bodyset/calcn_r location=(0.1658 -0.0081 0.0116) radius=0.015
    ContactSphere mh5_r: socket_frame=/bodyset/calcn_r location=(0.143 -0.0081 0.037) radius=0.015
    ContactSphere hallux_r: socket_frame=/bodyset/toes_r location=(0.0562 -0.0102 -0.0181) radius=0.015
    ContactSphere othertoes_r: socket_frame=/bodyset/toes_r location=(0.0441 -0.006 0.0242) radius=0.015
    ContactSphere heel_l: socket_frame=/bodyset/calcn_l location=(0.001307528 -0.0081 0) radius=0.015
    ContactSphere latheel_l: socket_frame=/bodyset/calcn_l location=(0.02130753 -0.0081 -0.025) radius=0.015
    ContactSphere medheel_l: socket_frame=/bodyset/calcn_l location=(0.02130753 -0.0081 0.025) radius=0.015
    ContactSphere mid_l: socket_frame=/bodyset/calcn_l location=(0.08355376 -0.0081 -0.0056) radius=0.015
    ContactSphere latmid_l: socket_frame=/bodyset/calcn_l location=(0.07215376 -0.0081 -0.031) radius=0.015
    ContactSphere medmid_l: socket_frame=/bodyset/calcn_l location=(0.09165376 -0.0081 0.023) radius=0.015
    ContactSphere mh1_l: socket_frame=/bodyset/calcn_l location=(0.182 -0.0081 0.023) radius=0.015
    ContactSphere mh3_l: socket_frame=/bodyset/calcn_l location=(0.1658 -0.0081 -0.0116) radius=0.015
    ContactSphere mh5_l: socket_frame=/bodyset/calcn_l location=(0.143 -0.0081 -0.037) radius=0.015
    ContactSphere hallux_l: socket_frame=/bodyset/toes_l location=(0.0562 -0.0102 0.0181) radius=0.015
    ContactSphere othertoes_l: socket_frame=/bodyset/toes_l location=(0.0441 -0.006 -0.0242) radius=0.015
    ContactHalfSpace floor: socket_frame=/ground orientation=(0 0 -1.570796)
